import Sofa
from scipy.spatial.transform import Rotation as R
import numpy as np


class Environment(Sofa.Core.Controller):
    '''
    A class used to define environment objects and to  build the SOFA collision
    and visualiztion model of the environment.

    :param root_node: The sofa root node
    :type root_node:
    :param environment_stl: The path to the environment STL mesh file
    :type environment_stl: str
    :param name: The name of the environment
    :type name: str
    :param T_env_sim: The transform defining the pose of the environment with respect to simulation frame [x, y, z, qx, qy, qz, qw]
    :type T_env_sim:
    :param flip_normals: A flag that defines the direction of the surface of the mesh object
    :type flip_normals: bool
    :param color: The color of environment used for visualization [r, g, b, alpha]
    :type color: list[float]
    :param `*args`: The variable arguments are passed to the SofaCoreController
    :param `**kwargs`: The keyword arguments arguments are passed to the SofaCoreController
    '''

    def __init__(
        self,
        root_node,
        environment_stl,
        name='environment',
        T_env_sim=[0., 0., 0., 1., 0., 0., 0.],
        flip_normals=False,
        color=[1., 0., 0., 0.3],
        scale='0.0005',
        visual=True,
        visual_stl=None,
        collision_proximity=0.0,
        triangle_collision_proximity=None,
        line_point_collision_proximity=None,
        use_line_point_collision=False,
        use_point_collision=False,
        use_line_collision=False,
        collision_exclusion_group=None,
        verbose=True,
        *args, **kwargs):

        # These are needed (and the normal way to override from a python class)
        Sofa.Core.Controller.__init__(self, *args, **kwargs)

        self.root_node = root_node
        self.environment_stl = environment_stl
        self.visual_stl = visual_stl
        self.name_env = name
        self.color = color

        # Training uses the static triangle wall only.  Optional vessel
        # Line/Point models remain available for diagnostics, but are disabled
        # by default because they multiply contact pairs on dense meshes.
        self.collision_proximity = float(collision_proximity)
        self.triangle_collision_proximity = (
            self.collision_proximity
            if triangle_collision_proximity is None
            else float(triangle_collision_proximity)
        )
        self.line_point_collision_proximity = (
            self.collision_proximity
            if line_point_collision_proximity is None
            else float(line_point_collision_proximity)
        )
        # Backward compatibility: the legacy combined switch still enables
        # both extra vessel primitives. New diagnostic/integration tests can
        # enable Point and Line independently.
        self.use_line_point_collision = bool(use_line_point_collision)
        self.use_point_collision = bool(
            use_point_collision or self.use_line_point_collision
        )
        self.use_line_collision = bool(
            use_line_collision or self.use_line_point_collision
        )
        self.collision_exclusion_group = (
            None
            if collision_exclusion_group is None
            else int(collision_exclusion_group)
        )
        self.verbose = bool(verbose)
        if self.verbose:
            print(
                "[VESSEL_COLLISION_ENV]",
                "base_proximity=", self.collision_proximity,
                "triangle_proximity=", self.triangle_collision_proximity,
                "line_point_proximity=", self.line_point_collision_proximity,
                "use_line_point_collision=", self.use_line_point_collision,
                "use_point_collision=", self.use_point_collision,
                "use_line_collision=", self.use_line_collision,
            )

        self.T_env_sim = T_env_sim
        r = R.from_quat(self.T_env_sim[3:7])
        rot_env_sim = (r.as_euler('xyz', degrees=True)).tolist()

        # collision model environment
        self.CollisionModel = root_node.addChild('CollisionModel')
        #self.CollisionModel.addObject("RequiredPlugin", name="Sofa.Component.IO.Mesh")
        self.CollisionModel.addObject(
            'MeshSTLLoader',
            filename=self.environment_stl,
            flipNormals=flip_normals,
            triangulate=True,
            name='meshLoader',
            rotation=rot_env_sim,
            translation=self.T_env_sim[0:3],
            scale=str(scale))
        #self.CollisionModel.addObject("RequiredPlugin", name="Sofa.Component.Topology.Container.Constant")
        self.CollisionModel.addObject(
            'Mesh',
            position='@meshLoader.position',
            triangles='@meshLoader.triangles',
            drawTriangles='0')
        #self.CollisionModel.addObject("RequiredPlugin", name="Sofa.Component.StateContainer")
        self.MO = self.CollisionModel.addObject(
            'MechanicalObject',
            position=[0, 0, 0],
            scale=1,
            name='DOFs1')
        #self.CollisionModel.addObject("RequiredPlugin", name="Sofa.Component.Collision.Geometry")
        triangle_collision_kwargs = dict(
            moving=False,
            simulated=False,
            bothSide=True,
            proximity=self.triangle_collision_proximity,
        )
        if self.collision_exclusion_group is not None:
            triangle_collision_kwargs["group"] = self.collision_exclusion_group
        self.TriangleCollisionModel = self.CollisionModel.addObject(
            'TriangleCollisionModel',
            **triangle_collision_kwargs)

        # Optional only. Keep Point and Line independently controllable so
        # Point-only anti-penetration can be tested without multiplying the
        # line-triangle contact set on a dense vessel mesh.
        if self.use_line_collision:
            self.CollisionModel.addObject(
                'LineCollisionModel',
                moving=False,
                simulated=False,
                proximity=self.line_point_collision_proximity)
        if self.use_point_collision:
            self.CollisionModel.addObject(
                'PointCollisionModel',
                moving=False,
                simulated=False,
                proximity=self.line_point_collision_proximity)

        # Visual model environment (only create when requested to avoid
        # instantiating SOFA's internal OpenGL viewer when using our pyglet
        # rendering pipeline).
        if visual:
            VisuModel = self.CollisionModel.addChild('VisuModel')
            #VisuModel.addObject("RequiredPlugin", name="Sofa.GL.Component.Rendering3D")
            #VisuModel.addObject("RequiredPlugin", name="Sofa.Component.Visual")
            #VisuModel.addObject("RequiredPlugin", name="Sofa.GL.Component.Shader")
            visual_source = '@../meshLoader'
            if self.visual_stl:
                VisuModel.addObject(
                    'MeshSTLLoader',
                    filename=self.visual_stl,
                    flipNormals=flip_normals,
                    triangulate=True,
                    name='visualMeshLoader',
                    rotation=rot_env_sim,
                    translation=self.T_env_sim[0:3],
                    scale=str(scale))
                visual_source = '@visualMeshLoader'
            VisuModel.addObject(
                'OglModel',
                name="VisualOgl_model",
                src=visual_source,
                color=self.color)

    def get_vessel_tree_positions(self):
        return np.asarray(self.MO.position.array())
